*Heading
** Job name: Job-1 Model name: Model-1
** Generated by: Abaqus/CAE 6.14-2
*Preprint, echo=NO, model=NO, history=NO, contact=NO
**
** PARTS
**
*Part, name=Draglink
*Node
      1, -0.0777519569, 0.00916008651,           0.
      2, -0.0777519569, 0.00916008651, 0.0299999993
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*Element, type=C3D10
    1,  1461,  1462,  1463,  1464,  2828,  2827,  2826,  2830,  2829,  2831
    2,  1465,  1466,  1467,  1461,  2834,  2833,  2832,  2836,  2835,  2837
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*Nset, nset=Set-1, generate
     1,  19429,      1
*Elset, elset=Set-1, generate
     1,  12313,      1
** Section: Section-1
*Solid Section, elset=Set-1, material=Material-1
,
*End Part
**
**
** ASSEMBLY
**
*Assembly, name=Assembly
**
*Instance, name=Draglink-1, part=Draglink
*End Instance
**
*Node
      1,           0., -0.00499999989,         0.25
*Nset, nset=Set-1, instance=Draglink-1
     1,     4,     7,     8,     9,    10
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*Elset, elset=Set-1, instance=Draglink-1
   622,  1088,  1091,  1092,  1100,  1102
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*Nset, nset=Set-3
 1,
*Nset, nset=m_Set-2
 1,
*Elset, elset=_s_Surf-1_S3, internal, instance=Draglink-1
   809,  1142,  1837,  2976,  3825,  4065
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*Elset, elset=_s_Surf-1_S1, internal, instance=Draglink-1
  4012,  4573,  5385,  5976,  9596,  9792,  9798, 10473
*Elset, elset=_s_Surf-1_S2, internal, instance=Draglink-1
  4266,  8211,  9793, 10375
*Elset, elset=_s_Surf-1_S4, internal, instance=Draglink-1
  6215,  6968,  9627,  9873, 10222, 10229, 10421, 11989
*Surface, type=ELEMENT, name=s_Surf-1
_s_Surf-1_S3, S3
_s_Surf-1_S1, S1
_s_Surf-1_S2, S2
_s_Surf-1_S4, S4
** Constraint: Constraint-1
*Coupling, constraint name=Constraint-1, ref node=m_Set-2, surface=s_Surf-1
*Kinematic
*End Assembly
**
** MATERIALS
**
*Material, name=Material-1
*Elastic
 2.1e+11, 0.3
**
** BOUNDARY CONDITIONS
**
** Name: BC-1 Type: Symmetry/Antisymmetry/Encastre
*Boundary
Set-1, ENCASTRE
** ----------------------------------------------------------------
**
** STEP: Step-1
**
*Step, name=Step-1, nlgeom=NO
*Static
1., 1., 1e-05, 1.
**
** LOADS
**
** Name: Load-1   Type: Concentrated force
*Cload
Set-3, 1, 20000.
**
** OUTPUT REQUESTS
**
*Restart, write, frequency=0
**
** FIELD OUTPUT: F-Output-1
**
*Output, field
*Node Output
U,
*Element Output, directions=YES
EVOL, S
**
** HISTORY OUTPUT: H-Output-1
**
*Output, history, variable=PRESELECT
*End Step
